f(x) := e^x
a := 0
b := 1
n := 10
i := 0 .. n
h := (b - a)/n
x[i] := a + i*h
x = [0; 0.1; 0.2; 0.3; 0.4; 0.5; 0.6; 0.7; 0.8; 0.9; 1]
S := integral(f(x), x = a .. b)
T := h*sum((f(x[i - 1]) + f(x[i]))/2, i = 1 .. n)
T = 1.71971
|S - T| = 0.00143166
S = 1.71828
